import sys
sys.path.append("/home/takumi/sofa/plugins/STLIB/python")
import Sofa
import os

def createScene(rootNode):

        rootNode.createObject('VisualStyle', displayFlags='showForceFields showBehaviorModels')
        rootNode.createObject('RequiredPlugin', name='SoftRobots')
        rootNode.createObject('RequiredPlugin', name='SofaPython')
        rootNode.createObject('RequiredPlugin', name='SofaSparseSolver')
        #rootNode.findData('bbox').value = [-100, -100, -100, 100, 100, 100]
        rootNode.findData('gravity').value=[-9810, 0, 0];
        rootNode.createObject('PythonScriptController', filename='pythonControllers/fingerController.py', classname='controller')
        rootNode.createObject('FreeMotionAnimationLoop')
        rootNode.createObject('GenericConstraintSolver', tolerance=1e-12, maxIterations=10000)


        finger = rootNode.createChild('finger')
        finger.createObject('EulerImplicitSolver', name='odesolver', rayleighStiffness=0.1, rayleighMass=0.1)
        finger.createObject('SparseLDLSolver', name='directSolver')
        finger.createObject('MeshVTKLoader', name='loader', filename='/media/sf_SOFA/Peneu_tuto/model/body.vtk')
        finger.createObject('MeshTopology', src='@loader', name='container')
        finger.createObject('MechanicalObject', name='tetras', template='Vec3', showObject=True, showObjectScale=True)
        finger.createObject('TetrahedronFEMForceField', template='Vec3', name='FEM', method='large', poissonRatio=0.3,  youngModulus=500, drawAsEdges=True)
        finger.createObject('UniformMass', totalMass=0.0008)
        finger.createObject('BoxROI', name='boxROISubTopo', box=[-72.5, 20, -7.5, -7.5, 17.5, 7.5], strict=False)
        finger.createObject('BoxROI', name='boxROI', box=[-10, 0, -20, 0, 30, 20], drawBoxes=True)
        finger.createObject('RestShapeSpringsForceField', points='@boxROI.indices', stiffness=1e12, angularStiffness=1e12)
        finger.createObject('LinearSolverConstraintCorrection', solverName='directSolver')

        modelSubTopo = finger.createChild('modelSubTopo')
        modelSubTopo.createObject('MeshTopology', position='@loader.position', tetrahedra='@boxROISubTopo.tetrahedraInROI', name='container')
        #modelSubTopo.createObject('TetrahedronFEMForceField', template='Vec3', name='FEM', method='large', poissonRatio=0.3,  youngModulus=1500)
        modelSubTopo.createObject('TetrahedronFEMForceField', template='Vec3', name='FEM', method='large', poissonRatio=0.3,  youngModulus=10000)

        cavity = finger.createChild('cavity')
        cavity.createObject('MeshSTLLoader', name='cavityLoader', filename='/media/sf_SOFA/Peneu_tuto/model/chamber.stl')
        cavity.createObject('MeshTopology', src='@cavityLoader', name='cavityMesh')
        cavity.createObject('MechanicalObject', name='cavity')
        cavity.createObject('SurfacePressureConstraint', name='SurfacePressureConstraint', template='Vec3', value=0.0001, triangles='@cavityMesh.triangles', valueType='pressure')
        cavity.createObject('BarycentricMapping', name='mapping', mapForces=False, mapMasses=False)
